*HEADING
Berkovich nanoindentation - fe00cr16 - deformable diamond cone - v19
** Identical mesh/BCs/step structure to indentation_fe16cr00_v19.inp
** Material: Fe0Cr16 single-crystal aniso BCC (MLP raw ablated C11/C12, raw full C44)
** C11=438290 MPa  C12=66060 MPa  C44=100200 MPa
** K=5*C11=2191450 MPa/um  sigma_inf=1096.0 MPa  kscalemax=1
** NOTE: Fe0Cr16 is AFM-initialised (tier C, GP-MLP agreement ~12 GPa). Treat Er with caution.
** Units: um / uN / MPa. Cone 70.3deg. Peak depth ~0.404 um (4 loading steps + 90% unload)
*NODE
1, 0, 0, 0
2, 5, 0, 0
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*ELEMENT, type=CAX6, ELSET=substrate_elems
605, 6534, 11395, 6579, 11892, 11891, 11890
606, 11789, 11813, 6273, 11895, 11894, 11893
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*ELEMENT, type=CAX6, ELSET=indenter_elems
22336, 49847, 44812, 49848, 50005, 50006, 50007
22337, 49762, 49763, 49960, 50008, 50009, 50010
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
** Element sets for sections
*ELSET, ELSET=substrate, GENERATE
605, 22335, 1
*ELSET, ELSET=indenter, GENERATE
22336, 33974, 1


** ============ MATERIALS ============
*MATERIAL, NAME=fe00cr16
*ELASTIC, TYPE=ANISO
438290., 66060., 438290., 66060., 66060., 438290., 0., 0.,
0., 100200., 0., 0., 0., 0., 100200., 0.,
0., 0., 0., 0., 100200., 0.
*MATERIAL, NAME=diamond
*ELASTIC
1141000., 0.07

*SOLID SECTION, ELSET=substrate, MATERIAL=fe00cr16
*SOLID SECTION, ELSET=indenter, MATERIAL=diamond
** ============ CONTACT ============
*SURFACE, NAME=surf_sub, TYPE=ELEMENT
1194, S3
18199, S3
18200, S3
18201, S3
18202, S3
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21859, S3
*SURFACE, NAME=surf_ind, TYPE=ELEMENT
22360, S1
22434, S1
22550, S1
22587, S1
22704, S1
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33706, S1

*SURFACE INTERACTION, NAME=frictionless
*SURFACE BEHAVIOR, PRESSURE-OVERCLOSURE=LINEAR
2191450., 1096.0

*CONTACT PAIR, INTERACTION=frictionless, TYPE=SURFACE TO SURFACE
surf_ind, surf_sub

** ============ BOUNDARY CONDITIONS ============
*NSET, NSET=nset_bottom
6, 7, 422, 423, 424, 425
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
*BOUNDARY
nset_bottom, 1, 2, 0.0

*NSET, NSET=nset_sub_axis
1, 7, 461, 462, 463, 464
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
*BOUNDARY
nset_sub_axis, 1, 1, 0.0

*NSET, NSET=nset_sub_right
5, 6, 383, 384, 385, 386
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
*BOUNDARY
nset_sub_right, 1, 1, 0.0

*NSET, NSET=nset_ind_axis
8, 11, 12, 1023, 1024, 1025
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
*BOUNDARY
nset_ind_axis, 1, 1, 0.0

*CONTROLS, PARAMETERS=CONTACT
0.001, 0.1, 1, 200
*CONTROLS, PARAMETERS=TIME INCREMENTATION
4, 8, 9, 16, 10, 4, , 10, ,
0.25, 0.5, 0.75, 0.85, , , 1.5,

** *CONTROLS, PARAMETERS=LINE SEARCH
** , 1.01, 0.025, ,

** ============ STEP ============
*NSET, NSET=nset_ind_top
10, 11, 1004, 1005, 1006, 1007
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*STEP, NLGEOM, INC=5000, UNSYM
*STATIC
1e-5, 0.1, 1e-12, 0.001
*BOUNDARY
nset_ind_top, 2, 2, -0.10100
*NODE PRINT, NSET=nset_ind_top, TOTALS=YES, FREQUENCY=10
U, RF
*NODE FILE, FREQUENCY=10
U
*EL FILE, FREQUENCY=10
S, E
*RESTART, WRITE, OVERLAY
*END STEP

*STEP, NLGEOM, INC=5000, UNSYM
*STATIC
1e-5, 0.1, 1e-12, 0.0008
*BOUNDARY
nset_ind_top, 2, 2, -0.20200
*NODE PRINT, NSET=nset_ind_top, TOTALS=YES, FREQUENCY=10
U, RF
*NODE FILE, FREQUENCY=10
U
*EL FILE, FREQUENCY=10
S, E
*RESTART, WRITE, OVERLAY
*END STEP

*STEP, NLGEOM, INC=5000, UNSYM
*STATIC
1e-5, 0.1, 1e-12, 0.0005
*BOUNDARY
nset_ind_top, 2, 2, -0.30300
*NODE PRINT, NSET=nset_ind_top, TOTALS=YES, FREQUENCY=10
U, RF
*NODE FILE, FREQUENCY=10
U
*EL FILE, FREQUENCY=10
S, E
*RESTART, WRITE, OVERLAY
*END STEP

*STEP, NLGEOM, INC=5000, UNSYM
*STATIC
1e-5, 0.1, 1e-12, 0.0005
*BOUNDARY
nset_ind_top, 2, 2, -0.40400
*NODE PRINT, NSET=nset_ind_top, TOTALS=YES, FREQUENCY=10
U, RF
*NODE FILE, FREQUENCY=10
U
*EL FILE, FREQUENCY=10
S, E
*RESTART, WRITE, OVERLAY
*END STEP


** ============================================================
** STEP 05 — UNLOADING (90% unload for Oliver-Pharr)
** Ramp U2 from -0.4040 um back to -0.04040 um
** step_time=0.1, same floor/max as loading steps
** ============================================================
*STEP, NLGEOM, INC=5000, UNSYM
*STATIC
1e-5, 0.1, 1e-12, 0.0002
*BOUNDARY
nset_ind_top, 2, 2, -0.04040
*NODE PRINT, NSET=nset_ind_top, TOTALS=YES, FREQUENCY=10
U, RF
*NODE FILE, FREQUENCY=10
U
*EL FILE, FREQUENCY=10
S, E
*RESTART, WRITE, OVERLAY
*END STEP
