** Fe16Cr0 v18 — restart from end of Step 4
** Mesh, materials, contact, and BCs are read from the .rin file.


*RESTART, READ

*CONTROLS, PARAMETERS=CONTACT
0.001, 0.1, 100, 200

*CONTROLS, PARAMETERS=TIME INCREMENTATION
4, 8, 9, 16, 10, 4, , 10, ,
0.25, 0.5, 0.75, 0.85, , , 1.5,

*CONTROLS, PARAMETERS=LINE SEARCH
, 1.01, 0.025, ,


** Step 5
*STEP, NLGEOM, INC=5000, UNSYM
*STATIC
1e-5, 0.1, 1e-12, 0.000008
*BOUNDARY
nset_ind_top, 2, 2, -0.50500
*NODE PRINT, NSET=nset_ind_top, TOTALS=YES, FREQUENCY=10
U, RF
*NODE FILE, FREQUENCY=10
U
*EL FILE, FREQUENCY=10
S, E
*RESTART, WRITE, OVERLAY
*END STEP

** Step 6
*STEP, NLGEOM, INC=5000, UNSYM
*STATIC
1e-5, 0.1, 1e-12, 0.00001
*BOUNDARY
nset_ind_top, 2, 2, -0.60600
*NODE PRINT, NSET=nset_ind_top, TOTALS=YES, FREQUENCY=10
U, RF
*NODE FILE, FREQUENCY=10
U
*EL FILE, FREQUENCY=10
S, E
*RESTART, WRITE, OVERLAY
*END STEP

** Step 7
*STEP, NLGEOM, INC=5000, UNSYM
*STATIC
1e-5, 0.1, 1e-12, 0.00001
*BOUNDARY
nset_ind_top, 2, 2, -0.70700
*NODE PRINT, NSET=nset_ind_top, TOTALS=YES, FREQUENCY=10
U, RF
*NODE FILE, FREQUENCY=10
U
*EL FILE, FREQUENCY=10
S, E
*RESTART, WRITE, OVERLAY
*END STEP

** Step 8
*STEP, NLGEOM, INC=5000, UNSYM
*STATIC
1e-5, 0.1, 1e-12, 0.00001
*BOUNDARY
nset_ind_top, 2, 2, -0.80800
*NODE PRINT, NSET=nset_ind_top, TOTALS=YES, FREQUENCY=10
U, RF
*NODE FILE, FREQUENCY=10
U
*EL FILE, FREQUENCY=10
S, E
*RESTART, WRITE, OVERLAY
*END STEP

** Step 9
*STEP, NLGEOM, INC=5000, UNSYM
*STATIC
1e-5, 0.1, 1e-12, 0.00001
*BOUNDARY
nset_ind_top, 2, 2, -0.90900
*NODE PRINT, NSET=nset_ind_top, TOTALS=YES, FREQUENCY=10
U, RF
*NODE FILE, FREQUENCY=10
U
*EL FILE, FREQUENCY=10
S, E
*RESTART, WRITE, OVERLAY
*END STEP

** Step 10
*STEP, NLGEOM, INC=5000, UNSYM
*STATIC
1e-5, 0.1, 1e-12, 0.00001
*BOUNDARY
nset_ind_top, 2, 2, -1.01000
*NODE PRINT, NSET=nset_ind_top, TOTALS=YES, FREQUENCY=10
U, RF
*NODE FILE, FREQUENCY=10
U
*EL FILE, FREQUENCY=10
S, E
*RESTART, WRITE, OVERLAY
*END STEP

** ============================================================
** STEP 11 — UNLOADING (90% unload for Oliver-Pharr)
** ============================================================
*STEP, NLGEOM, INC=5000, UNSYM
*STATIC
1e-5, 0.1, 1e-12, 0.000008
*BOUNDARY
nset_ind_top, 2, 2, -0.16000
*NODE PRINT, NSET=nset_ind_top, TOTALS=YES, FREQUENCY=10
U, RF
*NODE FILE, FREQUENCY=10
U
*EL FILE, FREQUENCY=10
S, E
*RESTART, WRITE, OVERLAY
*END STEP
