*HEADING
Minimal test
*INCLUDE, INPUT=../../geometry/cone_substrate.inp
*NSET, NSET=Naxis, ELSET=axis
*NSET, NSET=Nbottom, ELSET=bottom
*NSET, NSET=Ncontact, ELSET=contact
*INCLUDE, INPUT=../../material_cards/calculix_material_cards_best.inp
*SOLID SECTION, ELSET=substrate, MATERIAL=Fe16Cr0
*STEP
*STATIC
0.1, 1.0
*BOUNDARY
Nbottom, 1, 2, 0.0
*END STEP
