** Fe-Cr Material Cards  Best ML Surrogate
** Primary: MLP (C11/C12: raw ablated | C44: raw full)
** Uncertainty: GP posterior std (same variant)
** Units: GPa (multiply by 1000 for MPa in ABAQUS/CalculiX)
** Cubic Voigt order: C11 C12 C11 C12 C12 C11 C44 C44 C44

** Fe16Cr0  B=209.76 GPa  ZenerA=1.6340  C111.00  C121.00  C440.83
*MATERIAL, NAME=Fe16Cr0
*ELASTIC, TYPE=ANISO
307.430, 160.930, 307.430, 160.930, 160.930, 307.430, 119.690, 119.690,
119.690, 0.0

** Fe12Cr4  B=141.31 GPa  ZenerA=2.2535  C111.04  C121.02  C440.57
*MATERIAL, NAME=Fe12Cr4
*ELASTIC, TYPE=ANISO
205.220, 109.360, 205.220, 109.360, 109.360, 205.220, 108.010, 108.010,
108.010, 0.0

** Fe8Cr8  B=209.81 GPa  ZenerA=1.8109  C111.16  C121.10  C440.57
*MATERIAL, NAME=Fe8Cr8
*ELASTIC, TYPE=ANISO
300.500, 164.470, 300.500, 164.470, 164.470, 300.500, 123.170, 123.170,
123.170, 0.0

** Fe4Cr12  B=248.68 GPa  ZenerA=1.0412  C111.04  C121.02  C440.57
*MATERIAL, NAME=Fe4Cr12
*ELASTIC, TYPE=ANISO
396.510, 174.770, 396.510, 174.770, 174.770, 396.510, 115.440, 115.440,
115.440, 0.0

** Fe0Cr16  B=190.14 GPa  ZenerA=0.5384  C111.00  C121.00  C440.83
*MATERIAL, NAME=Fe0Cr16
*ELASTIC, TYPE=ANISO
438.290, 66.060, 438.290, 66.060, 66.060, 438.290, 100.200, 100.200,
100.200, 0.0
